*Heading
** Job name: Compression Model name: Model-1
** Generated by: Abaqus/CAE 2023
*Preprint, echo=NO, model=NO, history=NO, contact=NO
**
** PARTS
**
*Part, name=Part-1
*End Part
**
**
** ASSEMBLY
**
*Assembly, name=Assembly
**
*Instance, name=Part-1-1, part=Part-1
*Node
      1,  -38.8877983,    31.428318,           0.
      2,  -47.9547386,   14.1542625,           0.
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*Element, type=C3D8R
   1,  186,  169,  160,  194,   49,   32,   23,   57
   2,  158,  188,  187,  159,   21,   51,   50,   22
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*Nset, nset=Set-1, generate
    1,  2192,     1
*Elset, elset=Set-1, generate
    1,  1800,     1
** Section: Section-1
*Solid Section, elset=Set-1, material=Material-1
,
*End Instance
**
*Nset, nset=fixed, instance=Part-1-1, generate
   1,  137,    1
*Nset, nset=loading, instance=Part-1-1, generate
 2056,  2192,     1
*End Assembly
**
** MATERIALS
**
*Material, name=Material-1
*Elastic
210000., 0.33
*Plastic
39.,   0.
40., 0.02
44., 0.03
47., 0.04
50., 0.05
52., 0.06
54., 0.07
55., 0.08
56., 0.09
58.,  0.1
59.,  0.2
60.,  0.5
60.,  0.6
** ----------------------------------------------------------------
**
** STEP: Step-1
**
*Step, name=Step-1, nlgeom=NO
*Static
1., 1., 1e-05, 1.
**
** BOUNDARY CONDITIONS
**
** Name: fixed Type: Displacement/Rotation
*Boundary
fixed, 1, 1
fixed, 2, 2
fixed, 3, 3
fixed, 4, 4
fixed, 5, 5
fixed, 6, 6
** Name: loading Type: Displacement/Rotation
*Boundary
loading, 3, 3, -50.
**
** OUTPUT REQUESTS
**
*Restart, write, frequency=0
**
** FIELD OUTPUT: F-Output-1
**
*Output, field, variable=PRESELECT
**
** HISTORY OUTPUT: H-Output-1
**
*Output, history, variable=PRESELECT
*End Step
